# [reference: iSET_module.xmcd]
r_0 := 0.050
# [component: outputs S]
vt[1] := [0; 30]
vx[1] := [60; 0]
vI[1] := [1000; 1000]
vt[2] := [5; 35]
vx[2] := [0; 60]
vI[2] := [1000; 1000]
vt[3] := [10; 40]
vx[3] := [50; 40]
vI[3] := [10000; 10000]
vt[4] := [15; 45]
vx[4] := [0; 60]
vI[4] := [3000; 3000]
vt[5] := [20; 50]
vx[5] := [60; 0]
vI[5] := [1000; 1000]
vt[6] := [25; 55]
vx[6] := [0; 60]
vI[6] := [1000; 1000]
pS := plot(S)
L := max(transpose(S)[:, 1]) = 60
T := 60
x := 0, 0.5 .. L
t := 0, 0.1 .. T
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TT := 1
TT := AddTrainInTable(TT, 1, vt[1], vx[1], vI[1])
TT := AddTrainInTable(TT, 2, vt[2], vx[2], vI[2])
TT := AddTrainInTable(TT, 3, vt[3], vx[3], vI[3])
TT := AddTrainInTable(TT, 4, vt[4], vx[4], vI[4])
TT := AddTrainInTable(TT, 5, vt[5], vx[5], vI[5])
TT := AddTrainInTable(TT, 6, vt[6], vx[6], vI[6])
[mx; mt] := plotT(TT, 0, 60, 1)
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TT = [
    [1; [0; 30]; [60; 0]; [1000; 1000]]; [2; [5; 35]; [0; 60]; [1000; 1000]]; [3; [10; 40]; [50; 40]; [10000; 10000]]; [4; [15; 45]; [0; 60]; [3000; 3000]]; [5; [20; 50]; [60; 0]; [1000; 1000]]; [6; [25; 55]; [0; 60]; [1000; 1000]]
]
x_e(TT, 1, 3) = 54
F_R(x) := f_R(x, r_0, S)
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xk := 13
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Uk(n_n, t) := U_K(r_0, S, TT, 5, n_n, t)
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I_Н := Uk(1, 0)/2 = 1644.54
C := 1
p := -1/(2*C)
dt := 1
τ := -1/p
PRNPRECISION := 9
WRITEPRN("last_EH.txt", [0, 0]) = [0, 0]
t := 0, dt .. 60
E_Н(t) :=
    res ← 0 if t == 0
    if t > 0
        E_H ← E_Н(t - dt)
        res ← E_H + (Uk(1, t) - E_H)*(1 - e^(p*(t - dt)))
    res  # disabled
R_Н(t) :=
    res ← 2 if t == 0
    res ← R_Н(0)*e^(p*t) if t > 0
    res
(Uk(1, t) - E_Н(t))/(0.5*((E_Н(t) - E_Н(t - dt))/dt))
U1/t_k1*(t - τ*(1 - e^(-t/τ)))
(U2 - U1)/(t_k2 - t_k1)*((t - t_k1) - τ*(1 - e^(-(t - t_k1)/τ)))
r_UH :=
    t ← 0
    i ← 1
    res[i, 1] ← t
    res[i, 3] ← Uk(1, t)/dt
    res[i, 2] ← res[i, 3]*(t - τ*(1 - e^(-t/τ)))
    i ← i + 1
    t ← t + dt
    while t < 40
        res[i, 1] ← t
        res[i, 3] ← (Uk(1, t) - Uk(1, t - dt))/dt
        i ← i + 1
        t ← t + dt
    1
    res  # error: Пустой местозаполнитель.
r_EH :=
    t ← 0
    i ← 1
    res[i, 1] ← t
    res[i, 2] ← 0 + (Uk(1, t) - 0)*(1 - e^(p*t))
    i ← i + 1
    t ← t + dt
    while t < 40
        res[i, 1] ← t
        res[i, 2] ← res[i - 1, 2] + (Uk(1, t) - res[i - 1, 2])*(1 - e^(p*(t - res[i - 1, 1])))
        i ← i + 1
        t ← t + dt
    res
r_UH =  # error: Эта переменная не определена.
E_Н(t) := linterp(r_EH[:, 1], r_EH[:, 2], t)
i(t) := C*((E_Н(t + dt) - E_Н(t))/dt)
E_Н(1) = 1294.02
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