ORIGIN := 1
# [area: Список функцій]
# plot(pS) - схематичне зображення розрахункової схеми; повертає 2-вимірний вектор точок для відображення на графіку X-Y.
# plotT(TT, t0, tk, dt) - зображення графіку руху поїздів; повертає два n-вимірні вектори (mx, mt) точок для відображення на графіку X-Y на підставі тензора поїзної ситуації TT, початку часу t0, кінця часу tk та кроку dt.
#
# X_0(S) - повертає координату початку ділянки, км;
# X_k(S) - повертає координату кінця ділянки, км;
# l_vec(S) - повертає вектор координат розташування тягових підстанцій, км;
# p_vec(S) - повертає вектор внутрішніх опорів тягових підстанцій, Ом;
# r_vec(r_0, S) - повертає вектор опорів контактної мережі між тяговими підстанціями, Ом;
# r_vec_k(r_0, S) - повертає вектор опорів контактної мережі між тяговими підстанціями та від початку до кінця ділянки при наявності консольного живлення, Ом;
# n_vec(S) - повертає вектор вузлів з'єднання контактних підвісок, км;
# E_vec(S) - повертає вектор напруг холостого ходу тягових підстанцій, В;
# R_L(i, p, r) - повертає значення еквівалентного опору зліва від i-ї підстанції на підставі векторів внутрішніх опорів тягових підстанцій та опорів контактної мережі ділянки, Ом;
# R_R(i, p, r) - повертає значення еквівалентного опору справа від i-ї підстанції на підставі векторів внутрішніх опорів тягових підстанцій та опорів контактної мережі ділянки, Ом;
# R(i, p, r) - повертає значення еквівалентного опору до якого прикладається е.р.с. i-ї підстанції на підставі векторів внутрішніх опорів тягових підстанцій та опорів контактної мережі ділянки, Ом;
# I_L(i, p, r, E) - повертає транспонований вектор часткових вирівнювальних струмів в контактній мережі зліва від i-ї підстанції на підставі векторів: внутрішніх опорів тягових підстанцій, опорів контактної мережі ділянки, напруг холостого ходу тягових підстанцій, Ом;
# I_R(i, p, r, E) - повертає транспонований вектор часткових вирівнювальних струмів в контактній мережі справа від i-ї підстанції на підставі векторів: внутрішніх опорів тягових підстанцій, опорів контактної мережі ділянки, напруг холостого ходу тягових підстанцій, Ом;
# I_K(p, r, E) - повертає транспонований вектор результуючих вирівнювальних струмів в контактній мережі на підставі векторів: внутрішніх опорів тягових підстанцій, опорів контактної мережі ділянки, напруг холостого ходу тягових підстанцій, Ом;
# U_xx(E, I_k, p) - повертає вектор результуючих напруг холостого ходу в точках підключення тягових підстанцій до тягової мережі, В;
#
# AddTrainInTable(TT, num, vt, vx, vI) - додає інформацію у тензор поїзної ситуації TT, а саме num - номер поїзда, vt - вектору кривої часу, vx - вектору кривої шляху, vI - вектору кривої струму.
# x_e(TT, n, t) - графікова координата розташування поїзда з номером n у момент часу t, км;
# I_e(TT, n, t) - струм поїзда з номером n у момент часу t, А;
#
# Find_LR(x, S) - знаходить точки нерівномірності лівіше та правіше від заданої координати x у заданій схемі S; результат повертає у вигляді [j, x_L, x_R, x_LN, x_RN], де j - номер зони, x_L - координата підстанції зліва, x_R - координата підстанції справа,  x_LN - координата вузла зліва, x_RN - координата вузла справа.
# AddNode(_A, x, r_0, S) - в залежності від результатів пошуку найближчих вузлів зліва і справа
# додає точку в основну матрицю схеми A вузол від 1 до 3 з модифікацією зв'язків.
# modify(_A, j1, j2, r_old, r_LL, r_RR) - відповідає за модифікацію зв'язків в матриці А. Між вузлами j1 та j2 видаляє зв'язки, перераховує провідності вхідних віток, розділяє опір r_old між 1-м і 2-м вузлом на r_LL і r_RR. Новий вузол додається останнім.
# f.R(x, r_0, S) - визначає функцію опору тягової мережі, Ом.
# A(r_0, S) - повертає квадратну матрицю заданої схеми без навантажень. По головній діагоналі - власні результуючі провідності віток, які входять у вузол. Інші елементи - провідності зв'язків між  вузлами.
# F(x, r_0, S) - повертає функції струморозподілу кожної тягової підстанції. В залежності від x доповнює матрицю A вузлом навантаження з модифікацією параметрів схеми при знаходженні x між вузлами схеми. При цьому при попаданні x між i-м та j-м вузлом видаляються зв'язки між ними та додаються нові між i та x, x та j. Повертає тензор, в якому 1-й елемент - функція струморозподілу; 2-й - потенціали у вузлах; 3-й - індекс вузла з навантаженням.
# dU(x, x_n, I_n, n, r_0, S) - повертає функцію спаду напруги при розташуванні навантаження в точці x_n зі струмом I_n на колії з номером n.
#
# find_x(TT, t) - знаходить параметри навантажень в момент часу t з таблиці графіку руху.
# U_x(x, r_0, S) - повертає напругу холостого ходу в точці x тягової мережі, В.
# U_(r_0, S, TT, n, t) - повертає напругу на струмоприймачі електровозу з номером n без впливу інших.
# U(r_0, S, TT, n, t) - повертає напругу на струмоприймачі електровозу з номером n з впливом від інших навантажень.
# U_ш(r_0, S, TT, n, t) - повертає напругу на шинах тягової підстанції n у часі t, В.
# U_K(r_0, S, TT, x_k, n_n, t) - повертає напругу в точці x_k контактної мережі на колії n_n.
#
# NumToN(TT, n) - перетворює графіковий номер поїзда в порядковий.
#
# P_e(r_0, S, TT, t) - повертає миттєву потужність, що споживається навантаженнями, Вт.
# P_п(r_0, S, TT, t) - повертає миттєву потужність, що віддається тяговими підстанціями, Вт.
# dP(r_0, S, TT, t) - повертає втрати потужності в тяговій мережі, Вт.
# [area: Графічна частина]
draw_TP(x) :=
    R[rows(R) + 1, 1] ← x
    R[rows(R), 2] ← 0
    R[rows(R) + 1, 1] ← x
    R[rows(R), 2] ← 10
    R[rows(R) + 1, 1] ← x - 1
    R[rows(R), 2] ← 10
    R[rows(R) + 1, 1] ← x + 1
    R[rows(R), 2] ← 10
    R[rows(R) + 1, 1] ← x
    R[rows(R), 2] ← 10
    R[rows(R) + 1, 1] ← x
    R[rows(R), 2] ← 0
    R
draw_track(x1, x_fst, x2) :=
    R[rows(R) + 1, 1] ← x1
    R[rows(R), 2] ← 0
    R[rows(R) + 1, 1] ← x_fst
    R[rows(R), 2] ← 0
    R[rows(R) + 1, 1] ← x_fst
    R[rows(R), 2] ← 5
    R[rows(R) + 1, 1] ← x1
    R[rows(R), 2] ← 5
    R[rows(R) + 1, 1] ← x2
    R[rows(R), 2] ← 5
    R[rows(R) + 1, 1] ← x_fst
    R[rows(R), 2] ← 5
    R[rows(R) + 1, 1] ← x_fst
    R[rows(R), 2] ← 0
    R[rows(R) + 1, 1] ← x2
    R[rows(R), 2] ← 0
    R[rows(R) + 1, 1] ← x_fst
    R[rows(R), 2] ← 0
    R
draw_PP(x) :=
    R[rows(R) + 1, 1] ← x
    R[rows(R), 2] ← 0
    R[rows(R) + 1, 1] ← x
    R[rows(R), 2] ← 5
    R[rows(R) + 1, 1] ← x
    R[rows(R), 2] ← 0
    R
plot(pS) :=
    m ← rows(pS)
    n ← cols(pS)
    x_max ← max(transpose(pS)[:, 1])
    R ← [0, 0]
    fst ← 1
    for i ∈ 1 .. n
        if (pS[2, i] == 1)*(pS[4, i] == 1)
            if fst
                R ← stack(R, draw_track(0, pS[1, i], x_max))
                fst ← 0
            R ← stack(R, draw_TP(pS[1, i]))
        if pS[3, i] == 1
            if fst
                R ← stack(R, draw_track(0, pS[1, i], x_max))
                fst ← 0
            R ← stack(R, draw_PP(pS[1, i]))
    R
plotT(TT, t0, tk, dt) :=
    for i ∈ 1 .. rows(TT)
        vt ← TT[i][2]
        vx ← TT[i][3]
        t ← t0
        row ← 1
        while t ≤ tk
            if t < vt[1]
                mx[row, i] ← vx[1]
                mt[row, i] ← t
            if vt[1] ≤ t ≤ vt[last(vt)]
                mx[row, i] ← linterp(vt, vx, t)
                mt[row, i] ← t
            if t > vt[last(vt)]
                mx[row, i] ← vx[last(vx)]
                mt[row, i] ← t
            t ← t + dt
            row ← row + 1
    [mx; mt]
# [area: Розрахункові функції]
X_0(S) := S[1, 1]
X_k(S) := S[1, cols(S)]
l_vec(S) :=
    for i ∈ 1 .. cols(S)
        l[rows(l) + 1] ← S[1, i] if (S[2, i] == 1)*(S[4, i] == 1)
    l
p_vec(S) :=
    for i ∈ 1 .. cols(S)
        p[rows(p) + 1] ← S[6, i] if (S[2, i] == 1)*(S[4, i] == 1)
    p
r_vec(r_0, S) :=
    f ← -1
    for i ∈ 1 .. cols(S)
        if (f == -1)*(S[2, i] == 1)*(S[4, i] == 1)
            f ← i
            continue
        if (f ≠ -1)*((S[2, i] == 1)*(S[4, i] == 1))
            r[rows(r) + 1] ← (S[1, i] - S[1, f])*r_0/2
            f ← i
    r
r_vec_k(r_0, S) :=
    f ← -1
    l ← l_vec(S)
    r ← 0
    if l[1] ≠ X_0(S)
        r[rows(r) + 1] ← (l[1] - X_0(S))*r_0
        1
    for i ∈ 1 .. cols(S)
        if (f == -1)*(S[2, i] == 1)*(S[4, i] == 1)
            f ← i
            continue
        if (f ≠ -1)*((S[2, i] == 1)*(S[4, i] == 1))
            r[rows(r) + 1] ← (S[1, i] - S[1, f])*r_0/2
            f ← i
    if l[rows(l)] ≠ X_k(S)
        r[rows(r) + 1] ← (X_k(S) - l[rows(l)])*r_0
        1
    r
n_vec(S) :=
    for i ∈ 1 .. cols(S)
        n[rows(n) + 1] ← S[1, i] if (S[3, i] == 1)
    n
E_vec(S) :=
    for i ∈ 1 .. cols(S)
        E[rows(E) + 1] ← S[5, i] if (S[2, i] == 1)*(S[4, i] == 1)
    E
k_vec(TT) :=
    for i ∈ 1 .. rows(TT)
        res[i] ← TT[i][1]
    res
R_L(i, p, r) :=
    if i > 1
        for j ∈ 1 .. i - 1
            R_L ← p[j] + r[j] if j == 1
            R_L ← R_L + r[j] otherwise
            R_L ← R_L*p[j + 1]/(R_L + p[j + 1]) if j < i - 1
    R_L
R_R(i, p, r) :=
    if i < rows(p)
        for j ∈ rows(p) .. i + 1
            R_R ← p[j] + r[j - 1] if j == rows(p)
            R_R ← R_R + r[j - 1] otherwise
            R_R ← R_R*p[j - 1]/(R_R + p[j - 1]) if j > i + 1
    R_R
R(i, p, r) :=
    R ← p[i] + R_R(i, p, r) if i == 1
    R ← p[i] + R_L(i, p, r) if i == rows(p)
    R ← p[i] + 1/(1/R_L(i, p, r) + 1/R_R(i, p, r)) if (i > 1)*(i < rows(p))
    R
I_L(i, p, r, E) :=
    I[1, rows(p) - 1] ← 0
    If ← E[i]/R(i, p, r)
    if i > 1
        for k ∈ i - 1 .. 1
            I[1, k] ← If*R_R(i, p, r)/(R_L(i, p, r) + R_R(i, p, r)) if (k == i - 1)*(i ≠ rows(p))
            I[1, k] ← If if (k == i - 1)*(i == rows(p))
            I[1, k] ← I[1, k + 1]*p[k + 1]/(R_L(k + 1, p, r) + p[k + 1]) if (k ≠ i - 1)
    I
I_R(i, p, r, E) :=
    I[1, rows(p) - 1] ← 0
    If ← E[i]/R(i, p, r)
    if i < rows(p)
        for k ∈ i .. rows(p) - 1
            I[1, k] ← If*R_L(i, p, r)/(R_R(i, p, r) + R_L(i, p, r)) if (k == i)*(i > 1)
            I[1, k] ← If if (k == i)*(i == 1)
            I[1, k] ← I[1, k - 1]*p[k]/(R_R(k, p, r) + p[k]) if k ≠ i
    I
I_K(p, r, E) :=
    sum[1, rows(p) - 1] ← 0 if rows(p) > 1
    for i ∈ 1 .. rows(p)
        _Ik_L ← I_L(i, p, r, E)
        _Ik_R ← I_R(i, p, r, E)
        for j ∈ 1 .. rows(p) - 1
            sum[1, j] ← sum[1, j] - _Ik_L[1, j] + _Ik_R[1, j]
    sum
U_xx(E, I_k, p) :=
    res[1] ← E[1] - I_k[1, 1]*p[1]
    if rows(p) > 2
        for i ∈ 2 .. rows(p) - 1
            res[i] ← E[i] - (I_k[1, i] - I_k[1, i - 1])*p[i]
    res[rows(p)] ← E[rows(p)] + I_k[1, rows(p) - 1]*p[rows(p)]
    res
AddTrainInTable(TT, num, vt, vx, vI) :=
    T ← TT
    T[rows(T) + 1] ← [num; vt; vx; vI]
    T
x_e(TT, n, t) :=
    for i ∈ 1 .. rows(TT)
        if TT[i][1] == n
            ind ← i
            break
    vt ← TT[ind][2]
    vx ← TT[ind][3]
    res ← vx[1] if t < vt[1]
    res ← linterp(vt, vx, t) if (vt[1] ≤ t)*(t ≤ vt[last(vt)])
    res ← vx[last(vx)] if t > vt[last(vt)]
    res
I_e(TT, n, t) :=
    for i ∈ 1 .. rows(TT)
        if TT[i][1] == n
            ind ← i
            break
    vt ← TT[ind][2]
    vI ← TT[ind][4]
    linterp(vt, vI, t) if (vt[1] ≤ t)*(t ≤ vt[last(vt)])
    0 otherwise
# [area: Функції опору та струморозподілу тягової мережі]
Find_LR(x, S) :=
    l ← l_vec(S)
    n ← rows(l)
    for i ∈ 1 .. n - 1
        if (x ≥ l[i])*(x ≤ l[i + 1])
            j ← i
            x_L ← l[i]
            x_R ← l[i + 1]
            break
    x_LN_ ← x_R
    x_RN_ ← x_L
    for i ∈ 1 .. cols(S)
        if (S[1, i] > x_L)*(S[3, i] == 1)*(S[1, i] < x_R)
            x_LN_ ← S[1, i] if (S[1, i] ≥ x)*((S[1, i] - x) < (x_LN_ - x))
            x_RN_ ← S[1, i] if (x ≥ S[1, i])*((x - S[1, i]) < (x - x_RN_))
    x_LN ← x_RN_
    x_RN ← x_LN_
    [j, x_L, x_R, x_LN, x_RN]
modify(_A, j1, j2, r_old, r_LL, r_RR) :=
    n ← rows(_A)
    _A[j1, j2] ← 0
    _A[j2, j1] ← 0
    _A[j1, j1] ← _A[j1, j1] - 1/r_old + 1/r_LL
    _A[j2, j2] ← _A[j2, j2] - 1/r_old + 1/r_RR
    _A[n + 1, n + 1] ← 1/r_LL + 1/r_RR
    _A[j1, n + 1] ← -1/r_LL
    _A[n + 1, j1] ← -1/r_LL
    _A[j2, n + 1] ← -1/r_RR
    _A[n + 1, j2] ← -1/r_RR
    _A
AddNode(_A, x, r_0, S) :=
    l ← l_vec(S)
    r ← r_vec_k(r_0, S)
    s ← 0 if l[1] ≠ X_0(S)
    s ← -1 otherwise
    [j, x_L, x_R, x_LN, x_RN] ← Find_LR(x, S)
    r_L ← (x_LN - x_L)*r_0*0.5
    r_R ← (x_R - x_RN)*r_0*0.5
    r_12 ← (x_RN - x_LN)*r_0
    r_1 ← (x - x_LN)*r_0
    r_2 ← (x_RN - x)*r_0
    r_old ← r[j + s + 1]
    j1 ← j
    j2 ← j + 1
    if x_LN ≠ x_RN
        if (x_L ≠ x_LN)
            r_LL ← (x_LN - x_L)*r_0*0.5
            r_RR ← (x_R - x_LN)*r_0*0.5
            _A ← modify(_A, j1, j2, r_old, r_LL, r_RR)
            r_old ← r_RR
            j1 ← rows(_A)
        r_LL ← r_12*r_1/(r_1 + r_12 + r_2)
        r_RR ← r_R + r_2*r_12/(r_1 + r_12 + r_2)
        _A ← modify(_A, j1, j2, r_old, r_LL, r_RR)
        ind ← rows(_A)
        r_old ← r_RR
        j1 ← rows(_A)
        if (x_R ≠ x_RN)
            r_LL ← r_2*r_12/(r_1 + r_12 + r_2)
            r_RR ← (x_R - x_RN)*r_0*0.5
            _A ← modify(_A, j1, j2, r_old, r_LL, r_RR)
    otherwise
        r_LL ← r_L
        r_RR ← r_R
        _A ← modify(_A, j1, j2, r_old, r_LL, r_RR)
        ind ← rows(_A)
    [_A; ind]
f.R(x, r_0, S) :=
    l ← l_vec(S)
    n ← n_vec(S)
    p ← p_vec(S)
    r ← r_vec(r_0, S)
    x0 ← X_0(S)
    xk ← X_k(S)
    if ((x0 == l[1])*(xk == l[rows(l)]) + (x ≥ l[1])*(x ≤ l[rows(l)]))*rows(l) > 1
        [j, x_L, x_R, x_LN, x_RN] ← Find_LR(x, S)
        R_1 ← p[1] if j == 1
        R_1 ← 1/(1/R_L(j, p, r) + 1/p[j]) otherwise
        R_2 ← p[rows(p)] if j == rows(p) - 1
        R_2 ← 1/(1/R_R(j + 1, p, r) + 1/p[j + 1]) otherwise
        r_L ← (x_LN - x_L)*r_0*0.5
        r_R ← (x_R - x_RN)*r_0*0.5
        r_12 ← (x_RN - x_LN)*r_0
        r_1 ← (x - x_LN)*r_0
        r_2 ← (x_RN - x)*r_0
        if x_LN ≠ x_RN
            1
            res ← r_1*r_2/(r_1 + r_2 + r_12) + 1/(1/(r_1*r_12/(r_1 + r_2 + r_12) + R_1 + r_L) + 1/(r_2*r_12/(r_1 + r_2 + r_12) + R_2 + r_R))
        res ← 1/(1/(R_1 + r_L) + 1/(R_2 + r_R)) otherwise
    otherwise
        if x ≤ l[1]
            x_LN_ ← l[1]
            if rows(n) > 0
                x_RN_ ← n[1] if (n[1] < l[1])
                f_kon ← 1 otherwise
            f_kon ← 1 otherwise
            for i ∈ 1 .. cols(S)
                if (S[1, i] > x0)*(S[3, i] == 1)*(S[1, i] < l[1])
                    x_LN_ ← S[1, i] if (S[1, i] ≥ x)*((S[1, i] - x) < (x_LN_ - x))
                    x_RN_ ← S[1, i] if (x ≥ S[1, i])*((x - S[1, i]) < (x - x_RN_))
            x_LN ← x_RN_
            x_RN ← x_LN_
            R_2 ← p[1] if R_R(1, p, r) == 0
            R_2 ← 1/(1/R_R(1, p, r) + 1/p[1]) otherwise
            r_R ← (l[1] - x_RN)*r_0*0.5
            r_12 ← (x_RN - x_LN)*r_0
            r_1 ← (x - x_LN)*r_0
            r_2 ← (x_RN - x)*r_0
            res ← R_2 + r_R + (r_1 + r_12)*r_2/(r_1 + r_12 + r_2) if (x_LN ≠ x_RN)*(f_kon ≠ 1)
            res ← R_2 + (l[1] - x_RN)*r_0*0.5 + (x_RN - x)*r_0 otherwise
        if x ≥ l[rows(l)]
            if rows(n) > 0
                x_LN_ ← n[rows(n)] if (n[rows(n)] > l[rows(l)])
                f_kon ← 1 otherwise
            f_kon ← 1 otherwise
            x_RN_ ← l[rows(l)]
            for i ∈ 1 .. cols(S)
                if (S[1, i] > l[rows(l)])*(S[3, i] == 1)*(S[1, i] < xk)
                    x_LN_ ← S[1, i] if (S[1, i] ≥ x)*((S[1, i] - x) < (x_LN_ - x))
                    x_RN_ ← S[1, i] if (x ≥ S[1, i])*((x - S[1, i]) < (x - x_RN_))
            x_LN ← x_RN_
            x_RN ← x_LN_
            R_1 ← p[rows(l)] if R_L(rows(l), p, r) == 0
            R_1 ← 1/(1/R_L(rows(l), p, r) + 1/p[rows(l)]) otherwise
            r_L ← (x_LN - l[rows(l)])*r_0*0.5
            r_12 ← (x_RN - x_LN)*r_0
            r_1 ← (x - x_LN)*r_0
            r_2 ← (x_RN - x)*r_0
            res ← R_1 + r_L + r_1*(r_12 + r_2)/(r_1 + r_12 + r_2) if (x_LN ≠ x_RN)*(f_kon ≠ 1)
            res ← R_1 + (x_LN - l[rows(l)])*r_0*0.5 + (x - x_LN)*r_0 otherwise
    res
f_RF(x, N_F, p, r, r_0, S) :=
    l ← l_vec(S)
    n ← n_vec(S)
    x0 ← X_0(S)
    xk ← X_k(S)
    x_F ← l[N_F]
    if ((x0 == l[1])*(xk == l[rows(l)]) + (x ≥ l[1])*(x ≤ l[rows(l)]))*rows(l) > 1
        for i ∈ 1 .. rows(l) - 1
            if (x ≥ l[i])*(x ≤ l[i + 1])
                j ← i
                x_L ← l[i]
                x_R ← l[i + 1]
                break
        x_LN_ ← x_R
        x_RN_ ← x_L
        for i ∈ 1 .. cols(S)
            if (S[1, i] > x_L)*(S[3, i] == 1)*(S[1, i] < x_R)
                x_LN_ ← S[1, i] if (S[1, i] ≥ x)*((S[1, i] - x) < (x_LN_ - x))
                x_RN_ ← S[1, i] if (x ≥ S[1, i])*((x - S[1, i]) < (x - x_RN_))
        x_LN ← x_RN_
        x_RN ← x_LN_
        r_12 ← (x_RN - x_LN)*r_0
        r_1 ← (x - x_LN)*r_0
        r_2 ← (x_RN - x)*r_0
        res ← p[N_F] + (x_F - x_RN)*r_0*0.5 if x ≤ x_F
        res ← p[N_F] + (x_LN - x_F)*(r_0*0.5) if x > x_F
        res ← res + r_1*r_2/(r_1 + r_2 + r_12) + r_2*r_12/(r_1 + r_2 + r_12) if (x_LN ≠ x_RN)*(x ≤ x_F)
        res ← res + r_1*r_12/(r_1 + r_2 + r_12) + r_1*r_2/(r_1 + r_2 + r_12) if (x_LN ≠ x_RN)*(x > x_F)
    otherwise
        if x ≤ l[1]
            x_LN_ ← l[1]
            if rows(n) > 0
                x_RN_ ← n[1] if (n[1] < l[1])
                f_kon ← 1 otherwise
            f_kon ← 1 otherwise
            for i ∈ 1 .. cols(S)
                if (S[1, i] > x0)*(S[3, i] == 1)*(S[1, i] < l[1])
                    x_LN_ ← S[1, i] if (S[1, i] ≥ x)*((S[1, i] - x) < (x_LN_ - x))
                    x_RN_ ← S[1, i] if (x ≥ S[1, i])*((x - S[1, i]) < (x - x_RN_))
            x_LN ← x_RN_
            x_RN ← x_LN_
            r_12 ← (x_RN - x_LN)*r_0
            r_1 ← (x - x_LN)*r_0
            r_2 ← (x_RN - x)*r_0
            res ← p[N_F] + (x_F - x_RN)*r_0*0.5
            res ← res + (r_1 + r_12)*r_2/(r_1 + r_12 + r_2) if (x_LN ≠ x_RN)*(f_kon ≠ 1)
            res ← res + (x_RN - x)*r_0 otherwise
        if x ≥ l[rows(l)]
            if rows(n) > 0
                x_LN_ ← n[rows(n)] if (n[rows(n)] > l[rows(l)])
                f_kon ← 1 otherwise
            f_kon ← 1 otherwise
            x_RN_ ← l[rows(l)]
            for i ∈ 1 .. cols(S)
                if (S[1, i] > l[rows(l)])*(S[3, i] == 1)*(S[1, i] < xk)
                    x_LN_ ← S[1, i] if (S[1, i] ≥ x)*((S[1, i] - x) < (x_LN_ - x))
                    x_RN_ ← S[1, i] if (x ≥ S[1, i])*((x - S[1, i]) < (x - x_RN_))
            x_LN ← x_RN_
            x_RN ← x_LN_
            r_12 ← (x_RN - x_LN)*r_0
            r_1 ← (x - x_LN)*r_0
            r_2 ← (x_RN - x)*r_0
            res ← p[N_F] + (x_LN - x_F)*r_0*0.5
            res ← res + r_1*(r_12 + r_2)/(r_1 + r_12 + r_2) if (x_LN ≠ x_RN)*(f_kon ≠ 1)
            res ← res + (x - x_LN)*r_0 otherwise
    res
A(r_0, S) :=
    n ← rows(l_vec(S))
    l ← l_vec(S)
    p ← p_vec(S)
    r ← r_vec_k(r_0, S)
    s ← 0 if l[1] ≠ X_0(S)
    s ← -1 otherwise
    for i ∈ 1 .. n
        if (i > 1)*(i < n)
            res[i, i] ← 1/p[i] + 1/r[i + s] + 1/r[i + s + 1]
            1
        otherwise
            res[i, i] ← 1/p[i] + 1/r[i + s + 1] if i == 1
            res[i, i] ← 1/p[i] + 1/r[i + s] if i == n
        if i > 1
            res[i, i - 1] ← -1/r[i + s]
            1
        if i ≤ n - 1
            res[i, i + 1] ← -1/r[i + s + 1]
            1
    res
A_(r_0, S) :=
    n ← rows(l_vec(S))
    l ← l_vec(S)
    p ← p_vec(S)
    r ← r_vec_k(r_0, S)
    s ← 0 if l[1] ≠ X_0(S)
    s ← -1 otherwise
    for i ∈ 1 .. n
        if (i > 1)*(i < n)
            res[i, i] ← concat("1/", num2str(p[i]), "+1/r_", num2str(r[i + s]), "+1/r_", num2str(r[i + s + 1]))
            1
        otherwise
            res[i, i] ← concat("1/p_", num2str(p[i]), "+1/r_", num2str(r[i + s + 1])) if i == 1
            res[i, i] ← concat("1/p_", num2str(p[i]), "+1/r_", num2str(r[i + s])) if i == n
        if i > 1
            res[i, i - 1] ← concat("-1/r_", num2str(r[i + s]))
            1
        if i ≤ n - 1
            res[i, i + 1] ← concat("-1/r_", num2str(r[i + s + 1]))
            1
    res
F(x, r_0, S) :=
    l ← l_vec(S)
    p ← p_vec(S)
    r ← r_vec_k(r_0, S)
    s ← 0 if l[1] ≠ X_0(S)
    s ← -1 otherwise
    TP_flag ← 1
    for i ∈ 1 .. rows(l)
        G[i, i] ← 1/p[i]
    _A ← A(r_0, S)
    if (x ≤ l[1]) + (x ≥ l[rows(l)])
        if x ≤ l[1]
            B[1] ← 1
            B[rows(l)] ← 0
        B[rows(l)] ← 1 if x ≥ l[rows(l)]
    otherwise
        for i ∈ 1 .. rows(l)
            if x == l[i]
                TP_flag ← 0
                B[i] ← 1
                B[rows(l)] ← 0
                break
    if (x > l[1])*(x < l[rows(l)])*(TP_flag == 1)
        [_A; ind] ← AddNode(_A, x, r_0, S)
        G[rows(_A), rows(_A)] ← 0
        B[rows(_A)] ← 0
        B[ind] ← 1
    [G*_A^-1*B; _A^-1*B; ind]
dU(x, x_n, I_n, n, r_0, S) :=
    _F ← F(x_n, r_0, S)
    nv ← n_vec(S)
    M[:, 2] ← _F[2]*I_n
    M[:, 1] ← l_vec(S)
    if _F[3] ≠ 0
        M[_F[3], 1] ← x_n
        M[_F[3], 2] ← I_n*f.R(x_n, r_0, S)
    [j, x_L, x_R, x_LN, x_RN] ← Find_LR(x_n, S)
    if (x_L ≠ x_LN)*(x_LN ≠ x_RN)*(_F[3] ≠ 0)
        M[_F[3] - 1, 1] ← x_LN
        1
    if (x_R ≠ x_RN)*(x_LN ≠ x_RN)*(_F[3] ≠ 0)
        M[_F[3] + 1, 1] ← x_RN
        lst ← 1
    if n == 2
        del ← 1
        if rows(nv) ≠ 0
            for i ∈ 1 .. rows(nv)
                if x_n == nv[i]
                    del ← 0
                    break
        if (del == 1)*(_F[3] ≠ 0)
            M_res ← submatrix(M, 1, _F[3] - 1, 1, 2)
            M ← stack(M_res, submatrix(M, _F[3] + 1, _F[3] + 1, 1, 2)) if lst
            M ← M_res otherwise
    M ← csort(M, 1)
    linterp(M[:, 1], M[:, 2], x)
# [area: Функції розрахунку режиму напруги]
U_x(x, r_0, S) :=
    vec_l ← l_vec(S)
    vec_p ← p_vec(S)
    vec_r ← r_vec(r_0, S)
    vec_E ← E_vec(S)
    vec_Ux ← U_xx(vec_E, I_K(vec_p, vec_r, vec_E), vec_p)
    linterp(vec_l, vec_Ux, x) if rows(vec_p) > 1
    vec_E[1, 1] otherwise
find_x(TT, t) :=
    for i ∈ 1 .. rows(TT)
        n ← TT[i][1]
        vt ← TT[i][2]
        vx ← TT[i][3]
        vI ← TT[i][4]
        if min(vt) ≤ t ≤ max(vt)
            res[rows(res) + 1, 1] ← n
            res[rows(res), 2] ← linterp(vt, vx, t)
            M[:, 1] ← vx
            M[:, 2] ← vI
            M ← csort(M, 1)
            res[rows(res), 3] ← linterp(M[:, 1], M[:, 2], res[rows(res), 2])
    res if res ≠ 0
    break otherwise
U_(r_0, S, TT, n, t) :=
    vec_p ← p_vec(S)
    vec_E ← E_vec(S)
    vec_r ← r_vec(r_0, S)
    x_cur ← x_e(TT, n, t)
    I_cur ← I_e(TT, n, t)
    U_x(x_cur, r_0, S) - I_cur*f.R(x_cur, r_0, S)
U(r_0, S, TT, n, t) :=
    vec_p ← p_vec(S)
    vec_r ← r_vec(r_0, S)
    vec_E ← E_vec(S)
    vec_k ← k_vec(TT)
    res_find ← find_x(TT, t)
    if rows(res_find) > 0
        f ← 0
        for i ∈ 1 .. rows(res_find)
            if res_find[i, 1] == vec_k[n]
                f ← 1
                ind ← i
                break
        break if f == 0
        otherwise
            x ← res_find[ind, 2]
            I ← res_find[ind, 3]
            U_res ← U_x(x, r_0, S) - I*f.R(x, r_0, S)
            for i ∈ 1 .. rows(res_find)
                if i ≠ ind
                    x_n ← res_find[i, 2]
                    I_n ← res_find[i, 3]
                    n_n ← 1 if (mod(res_find[i, 1], 2) == 0)*(mod(res_find[ind, 1], 2) == 0)
                    n_n ← 2 otherwise
                    U_res ← U_res - dU(x, x_n, I_n, n_n, r_0, S)
            U_res
    break otherwise
U_K(r_0, S, TT, x_k, n_n, t) :=
    1
    U_res ← U_x(x_k, r_0, S)
    res_find ← find_x(TT, t)
    if rows(res_find) > 0
        for i ∈ 1 .. rows(res_find)
            x_n ← res_find[i, 2]
            I_n ← res_find[i, 3]
            U_res ← U_res - dU(x_k, x_n, I_n, n_n, r_0, S)
    U_res
U_ш(r_0, S, TT, n, t) :=
    vec_l ← l_vec(S)
    vec_p ← p_vec(S)
    vec_E ← E_vec(S)
    res_f ← find_x(TT, t)
    res ← U_x(vec_l[n], r_0, S)
    f_R ← f.R(vec_l[n], r_0, S)
    for i ∈ 1 .. rows(res_f)
        x ← res_f[i, 2]
        I ← res_f[i, 3]
        res ← res - I*F(x, r_0, S)[1][n]*f_R
    res
# [area: Функції розрахунку енергетичних показників]
NumToN(TT, n) :=
    vec_k ← k_vec(TT)
    for i ∈ 1 .. rows(vec_k)
        if n == vec_k[i]
            res ← i
            break
    res
P_e(r_0, S, TT, t) :=
    res_f ← find_x(TT, t)
    sum ← 0
    for i ∈ 1 .. rows(res_f)
        sum ← sum + U(r_0, S, TT, NumToN(TT, res_f[i, 1]), t)*res_f[i, 3]
    sum
P_п(r_0, S, TT, t) :=
    vec_l ← l_vec(S)
    res_f ← find_x(TT, t)
    sum ← 0
    for j ∈ 1 .. rows(vec_l)
        _U ← U_ш(r_0, S, TT, j, t)
        for i ∈ 1 .. rows(res_f)
            x ← res_f[i, 2]
            I ← res_f[i, 3]
            sum ← sum + I*F(x, r_0, S)[1][j]*_U
    sum
dP(r_0, S, TT, t) :=
    vec_l ← l_vec(S)
    res_f ← find_x(TT, t)
    sum ← 0
    for j ∈ 1 .. rows(vec_l)
        _U ← U_ш(r_0, S, TT, j, t)
        for i ∈ 1 .. rows(res_f)
            x ← res_f[i, 2]
            I ← res_f[i, 3]
            pp_s ← pp_s + I*F(x, r_0, S)[1][j]*_U
            pe_s ← pe_s + U(r_0, S, TT, NumToN(TT, res_f[i, 1]), t)*res_f[i, 3] if j == rows(vec_l)
    pp_s - pe_s
